# Лабораторная работа №1
# Задание №1
# Исследование функции и построение графика
y(x) := (e^x - e^(-x))/(e^x + e^(-x))
# 1. Область определения
# R = (-∞;+∞)
# 2. Четность функции
y(-x) → (e^(-x) - e^x)/(e^(-x) + e^x)  # Функция нечетная
# 3. Точки пересечения графика функции с осями координат
y(0) → 0
y(x) solve → 0
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# 4. Исследование функции на непрерывность
limit(y(x), x → 0) → 0
# Функция непрерывна
# 5. Исследование функции на бесконечность
limit(y(x), x → ∞) → 1
limit(y(x), x → -∞) → -1
# 6. Наклонные асимптоты
k1 := limit(y(x)/x, x → -∞) → 0
k := limit(y(x)/x, x → ∞) → 0
b1 := limit(y(x) - k1*x, x → -∞) → -1
b := limit(y(x) - k*x, x → ∞) → 1
f1(x) := k1*x + b1
f(x) := k*x + b
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# 7. Исследование первой производной
y1(x) := d/dx(y(x)) → 1 - (e^(-x) - e^x)^2/(e^(-x) + e^x)^2
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# min
y1(x) solve →  # error: No solution was found.  # max
y1(x) > 0 solve → x ∈ ℝ  # Участки возрастания
y1(x) < 0 solve →  # error  # Участки убывания
# 8. Исследование второй производной
y2(x) := d^2/dx^2(y(x)) → 2*(e^(-x) - e^x)/(e^(-x) + e^x) - 2*(e^(-x) - e^x)^3/(e^(-x) + e^x)^3
y2(x) solve → 0  # Точка перегиба
y2(x) > 0 solve → x < 0  # участки вогнутости
y2(x) < 0 solve → 0 < x  # участок выпуклости
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# Задание №2
# Построить график параметрической функции
a := 5
b := 5
x(t) := a*cos(t)^3
y(t) := b*sin(t)^3  # - Астроида
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# Задание №3
# Построить график заданный в полярной системе координат
a := 10
φ := 0, 0.01 .. 10*π
θ := 0, 001 .. 10*π
r(ϕ) := a*sec(ϕ - θ)  # -нерадиальная прямая
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