# Worksheet setting: ORIGIN = 1
# Работа с векторами и матрицами. Массивы
# Вариант №4
A := [-3, 2, 1; 2, -5, 3; 3, 4, -2]
b := [1; 3; 3]
C := [1, -1, -1; 4, 0, -1; -2, 1, 2]
# Операции с векторами матрицы
# -Суммирование А и С и их линейная комбинация:
k := 5
A + C = [-2, 1, 0; 6, -5, 2; 1, 5, 0]
A + k*C = [2, -3, -4; 22, -5, -2; -7, 9, 8]
# -Умножение матрицы А на С слева и спрва+ произведение матрицы и вектора:
A*C = [3, 4, 3; -24, 1, 9; 23, -5, -11]
C*A = [-8, 3, 0; -15, 4, 6; 14, -1, -3]
C*b = [-5; 1; 7]
# -Поэлементное умножение матриц и применение к матрице тригонометрического выражения:
vectorize(tan(C)) = [1.55741, -1.55741, -1.55741; 1.15782, 0, -1.55741; 2.18504, 1.55741, -2.18504]
vectorize(A*C) = [-3, -2, -1; 8, 0, -3; -6, 4, -4]
cot(b) = [0.642093; -7.01525; -7.01525]
# -Выделение из матрицы столбца+сумма элементов+перемножение на вектор b(скал
v := C[:, 2] = [-1; 0; 1]
sum(v) = 0
векторное
# скалярное | абсолютная величина
b*v = 2
v×b = [-3; 4; -3]
b*v = 2
b×v = [3; -4; 3]
# №2. Расчет норм векторов и определителей: | C
# -Найти норму вектора b и сонаправленный с ним единичный вектор:
n := length(b)
|b| = 4.3589
n = 3
sqrt(sum(b[i]^2, i = 1 .. n)) = 4.3589  # Норма вектора b =4.359
|d| =  # error: This variable is undefined.
d := b/|b|
d = [0.229416; 0.688247; 0.688247]  # Сонаправленный с b единичный вектор
# -Проверить для норм векторов b и v неравенство треугольника:
|b + v| = 5
|v| + |b| = 5.77311
|b + v| < |b| + |v| → 1  # норма сумм меньше суммы норм
# -Посчитать косинус угла между векторами:
cbv := b*v/(|b|*|v|)
cbv = 0.324443
# -Вычислить определители матриц А и С и их произведений и проверить равенство:
|A| = 55
|A*C| = 165
|A|*|C| == |A*C| → 1
|A*C| == |C*A| → 1
|C| = 3
|C*A| = 165
# №3.Транспонирование и обращение квадратной матрицы
# -Транспонировать матрицу А и найти определитель:
transpose(A) = [-3, 2, 3; 2, -5, 4; 1, 3, -2]
|transpose(A)| = 55
|A| =  # no stored result
# -Вычислить обратную матрицу А, умножить на исходную слева и справа:
A^-1 = [-0.0363636, 0.145455, 0.2; 0.236364, 0.0545455, 0.2; 0.418182, 0.327273, 0.2]
A^-1*A = [1, 0, 0; 0, 1, 0; 0, 0, 1]
A*A^-1 = [1, 0, 0; 0, 1, 0; 0, 0, 1]
# №4. Символьные операции с векторами и матрицами:
# -Применить некторые символьные операции для матриц и векторов
transpose(A*C) = [3, -24, 23; 4, 1, -5; 3, 9, -11]
transpose(C)*transpose(A) = [3, -24, 23; 4, 1, -5; 3, 9, -11]
[a11, a12, a13; a21, a22, a23] + [c11, c12, c13; c21, c22, c23] → [a11 + c11, a12 + c12, a13 + c13; a21 + c21, a22 + c22, a23 + c23]
transpose(A*C) == transpose(C)*transpose(A) → 1
[a11, a12, a13; a21, a22, a23]*[c11, c12; c21, c22; c31, c32] → [
    a11*c11 + a12*c21 + a13*c31, a11*c12 + a12*c22 + a13*c32;
    a21*c11 + a22*c21 + a23*c31, a21*c12 + a22*c22 + a23*c32
]
|[b1; b2; b3]| → sqrt(|b1|^2 + |b2|^2 + |b3|^2)  # норма вектора b
[b1; b2; b3]*[v1; v2; v3] → b1*conj(v1) + b2*conj(v2) + b3*conj(v3)  # скалярное умножение
[b1; b2; b3]×[v1; v2; v3] → [b2*v3 - b3*v2; b3*v1 - b1*v3; b1*v2 - b2*v1]  # векторное умножение
# -Пользуясь символьным меню транспонировать матрицы, найти обратную матрицу и определители:
[a11, a12, a13; a21, a22, a23; a31, a32, a33]
transpose([a11, a12, a13; a21, a22, a23; a31, a32, a33]) → [a11, a21, a31; a12, a22, a32; a13, a23, a33]
det([a11, a12, a13; a21, a22, a23; a31, a32, a33]) → a11*a22*a33 - a11*a23*a32 - a12*a21*a33 + a12*a31*a23 + a21*a13*a32 - a13*a22*a31
[a11, a12; a21, a22]
transpose([a11, a21; a21, a22]) → [a11, a21; a21, a22]
det([a11, a12; a21, a22]) → a11*a22 - a12*a21
[a11, a12; a21, a22]^-1 → [
    a22/(a11*a22 - a12*a21), -a12/(a11*a22 - a12*a21);
    -a21/(a11*a22 - a12*a21), a11/(a11*a22 - a12*a21)
]
# №5. Векторные и матричные функции:
# -Решить 2-е СЛАУ
x1 := lsolve(A, b)
x1 = [1; 1; 2]
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r := [3; 2; -1; -1]
z := [1, -1, 1, -1; 2, 0, 4, -1; 7, 1, 6, 0; 6, 0, 5, 2]
x2 := lsolve(z, r)
x2 → [-3/16; -31/16; 3/8; -7/8]
# -Проверка:
z*x2 == r → 1
# -Для заданных матриц и вектора применить функции из теоретического раздела:
length(b) → 3  # Возвращает число элементов вектора
last(b) → 3  # "Возвращает последний элемент вектора
cols(A) → 3  # Возвращает число столбцов
cols(C) → 3
rows(A) → 3
# Возвращает число строк
rows(C) → 3
sort(b) → [1; 3; 3]  # Сортировка элементов вектора
reverse(b) → [3; 3; 1]  # Перестановка в обратном порядке
csort(A, 2) → [2, -5, 3; -3, 2, 1; 3, 4, -2]
# Перестановка и сортировка определенного столбца матрицы
csort(C, 2) → [1, -1, -1; 4, 0, -1; -2, 1, 2]
rsort(A, 2) → [2, -3, 1; -5, 2, 3; 4, 3, -2]  # Перестановка и сортировка определенной строки матрицы
rsort(C, 2) → [-1, -1, 1; -1, 0, 4; 2, 1, -2]
# Векторные и матричные функции. СЛАУ.
x := A^-1*b
max(A) → 4  # Возвращение максимального элемента матрицы\вектора
# lsolve - возвращает вектор х для системы линейных уравнений  А*х = b  при заданной матрице коэфициентов А и векторе свободных членов b
x = [1; 1; 2]
max(b) → 3
min(A) → -5  # Возвращение минимального элемента матрицы\вектора
min(b) → 1
rank(A) → 3  # Возвращает ранг матрицы
rank(C) → 3
F := [3, 1, -5, 1; -1, -1, 1, -1; 5, 3, -2, 2; -1, 7, 0, 3]
q := [2; -1; 4; -4]
x := F^-1*q
tr(A) → -10  # Сумма диагональных элементов квадратной матрицы
tr(C) → 3
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x = [0.982759; -0.948276; 0.241379; 1.2069]
Re(A) → [-3, 2, 1; 2, -5, 3; 3, 4, -2]
# Вывод действительных частей матрицы\вектора
x2 := lsolve(F, q)
Re(b) → [1; 3; 3]
x2 = [0.982759; -0.948276; 0.241379; 1.2069]
Im(A) → [0, 0, 0; 0, 0, 0; 0, 0, 0]
# Вывод мнимых частей матрицы\вектора
Im(b) → [0; 0; 0]
augment(F, q) = [3, 1, -5, 1, 2; -1, -1, 1, -1, -1; 5, 3, -2, 2, 4; -1, 7, 0, 3, -4]
rref(augment(F, q)) = [1, 0, 0, 0, 0.982759; 0, 1, 0, 0, -0.948276; 0, 0, 1, 0, 0.241379; 0, 0, 0, 1, 1.2069]
# аugment -  объединяет в один массив массивы указанные в списке имеет
# одинаковое колличество строк
augment(A, b) = [-3, 2, 1, 1; 2, -5, 3, 3; 3, 4, -2, 3]
rref(augment(A, b)) = [1, 0, 0, 1; 0, 1, 0, 1; 0, 0, 1, 2]  # rref - преобразование матрицы к ступенчатому виду
eigenvals(A) → [
    64/(9*(565/54 + sqrt(108)*sqrt(27013)*1i/108)^(1/3)) + (565/54 + sqrt(108)*sqrt(27013)*1i/108)^(1/3) - 10/3;
    -32/(9*(565/54 + sqrt(108)*sqrt(27013)*1i/108)^(1/3)) - (565/54 + sqrt(108)*sqrt(27013)*1i/108)^(1/3)/2 - 10/3 + sqrt(3)*(64/(9*(565/54 + sqrt(108)*sqrt(27013)*1i/108)^(1/3)) - (565/54 + sqrt(108)*sqrt(27013)/108*1i)^(1/3))*1i/2;
    -32/(9*(565/54 + sqrt(108)*sqrt(27013)*1i/108)^(1/3)) - (565/54 + sqrt(108)*sqrt(27013)*1i/108)^(1/3)/2 - 10/3 - sqrt(3)*(64/(9*(565/54 + sqrt(108)*sqrt(27013)*1i/108)^(1/3)) - (565/54 + sqrt(108)*sqrt(27013)/108*1i)^(1/3))*1i/2
]  # Встроенные векторные и матричные функции
eigenvecs(b)  # error: not a square matrix
eigenvec(A, 2)  # error: No eigenvectors found.
submatrix(A, 1, 3, 3, 3) → [1; 3; -2]
augment(A, C) → [-3, 2, 1, 1, -1, -1; 2, -5, 3, 4, 0, -1; 3, 4, -2, -2, 1, 2]
stack(A, C) → [-3, 2, 1; 2, -5, 3; 3, 4, -2; 1, -1, -1; 4, 0, -1; -2, 1, 2]
rref(A) → [1, 0, 0; 0, 1, 0; 0, 0, 1]
rref(C) → [1, 0, 0; 0, 1, 0; 0, 0, 1]
