# Лабораторная работа №3
# Вариант №21(1)
# Задание №1
(x^2/a^2 + y^2/b^2 + z^2/c^2) = 1  # error: Эта переменная не определена.  # Элипсоида
i := 0 .. 20
j := 0 .. 20
h := 0.2
x[i] := -2 + i*h
y[j] := -2 + j*h
a := 1
b := 1
c := 1
z1(x, y) := c^2*sqrt(1 - x^2/a^2 - y^2/b^2)
z2(x, y) := -(c^2*sqrt(1 - x^2/a^2 - y^2/b^2))
M1[i, j] := z1(x[i], y[j])
M2[i, j] := z2(x[i], y[j])
# [component: inputs M1, M2]
# Задание №2
# построение функции с помощью встроенной функции createMesh
z3(x, y) := |sqrt(c^2*(1 - x^2/a^2 - y^2/b^2))|
a := -2
b := 3
m := 30
q := CreateMesh(z3, a, b, a, b, m)
# [component: inputs q]
# [component: inputs q]
# [component: inputs q]
# [component: inputs q]
# [component: inputs q]
# Задание №3
# Построить поверхность вращения вокруг оси ОХ и ОУ
y(x) := (e^x - e^(-x))/(e^x + e^(-x))
a := -2
b := 2
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m := 30  # колличество линий сетки
F1(u, v) := u*sin(v)
F(u, v) := u
G1(u, v) := u*cos(v)
G(u, v) := y(u)*cos(v)
H1(u, v) := y(u)
H(u, v) := y(u)*sin(v)
SY := CreateMesh(F1, G1, H1, a, b, 0, 2*π, m)
SX := CreateMesh(F, G, H, a, b, 0, 2*π, m)
# [component: inputs SY]
# [component: inputs SX]
# Задание №4
# Построить поверхность заданную параметрически(Катеноид)
m := 20
i := 0 .. m
j := 0 .. m
a := 1
h := 0.2
u[i] := -2 + i*h
v[j] := -2 + 2*j*h
x[i, j] := a*cosh(u[i]/a)*cos(v[j])
y[i, j] := a*cosh(u[i]/a)*sin(v[j])
z[i, j] := u[i]
# [component: inputs (x, y, z)]
# Задание №5
# Построить поверхность заданную в виде вектора параметрических функций
Элипсоид
a := 1
b := 2
c := 1
x(u, v) := a*sin(u)*cos(v)
y(u, v) := b*sin(u)*sin(v)
z(u, v) := c*cos(u)
v := [x; y; z]
# [component: inputs v]
# Задание №6
# Построить спираль заданную параметрически
createSpace(F, t0, t1, t, m)
# возвращает массив трех векторов представляющий x,y,z  координаты пространственной прямой  функуии одной переменной. параметр t  изменяющегося в пределах от t0 до t1
a := 12
g(t) := [t*sin(a*t); t*cos(a*t); 2*a*t]
Q := CreateSpace(g, 0, 4, 200)
# [component: inputs Q]
# Задание №7
# Построить многогранник
# [component: inputs Polyhedron("#4")]
