# символьные вычисления
# 1)Упростить выражение
# упрощение до | 1
((a^2 + 9)/(a^2 - 6*a + 9))*(3 + a - 18/(3 - a))^-1*(a - 3)
((a^2 + 9)/(a^2 - 6*a + 9))*(3 + a - 18/(3 - a))^-1*(a - 3) simplify → 1
# 2)Раскрыть скобки
(a + b)*(a^2 - ab - b^2)
# расширение до
a^3 + a^2*b - a*b^2 - ab*a - b^3 - ab*b
(a + b)*(a^2 - ab - b^2) expand → a^3 + a^2*b - a*b^2 - ab*a - b^3 - ab*b
# 3)Разложить на множители
a^3 + a^2*b - a*b^2 - ab*a - b^3 - ab*b  # в результате факторизации
(a + b)*(a^2 - b^2 - ab)
a^3 + a^2*b - a*b^2 - ab*a - b^3 - ab*b factor → (a + b)*(a^2 - b^2 - ab)
144 factor → 2^4*3^2
# 4)Решить уравнение
# имеются решения
[2; -5]
x^2 + 3*x + 4*sqrt(x^2 + 3*x - 6) == 18
x^2 + 3*x + 4*sqrt(x^2 + 3*x - 6) == 18 solve → [2; -5]
# 5) Полиномиальные коэффициенты
# команда находит коэфффициенты полинома по зданной переменной представленной в виде вектора-столбца и расположены по возрастанию степеней .
# имеются коэффициенты
[a^2 + c; -2*a^2 - 2*a; 4*a - a^2 + b + 1; 2*a^2 + 2*a - 2; -4*a - 1; 2]
(x - a)^2*(2*x - 1)*(x^2 - 1) + b*x^2 + c
(x - a)^2*(2*x - 1)*(x^2 - 1) + b*x^2 + c coeffs, x → [a^2 + c; -2*a^2 - 2*a; 4*a - a^2 + b + 1; 2*a^2 + 2*a - 2; -4*a - 1; 2]
(x + 1)^3/3 - x*sin(1) + x^2*exp(-1) - ln(c)  # имеются коэффициенты
[1/3 - ln(c); 1 - sin(1); e^-1 + 1; 1/3]
(x + 1)^3/3 - x*sin(1) + x^2*exp(-1) - ln(c) coeffs, x → [1/3 - ln(c); 1 - sin(1); e^-1 + 1; 1/3]
# находит значения выделенной переменной при которых выражение становится равным нулю , если выражение не содержит равенст или решает уравнение или решает неравенства относительно выделенной переменной
# 7)Замена переменной
# substitute Заменяет указанную команду содержимым буфера обмена
18
x^2 + 3*x + 4*sqrt(x^2 + 3*x - 6)  # в результате подстановки
x^2 + 3*x + 4*sqrt(x^2 + 3*x - 6) substitute, x == 2 → 18
a + b
x^2 + 3*x + 4*sqrt(x^2 + 3*x - 6) substitute, x == a + b → 3*a + 3*b + a^2 + b^2 + 2*a*b + 4*sqrt(a^2 + 2*a*b + 3*a + b^2 + 3*b - 6)
x^2 + 3*x + 4*sqrt(x^2 + 3*x - 6)  # в результате подстановки
3*a + 3*b + a^2 + b^2 + 2*a*b + 4*sqrt(a^2 + 2*a*b + 3*a + b^2 + 3*b - 6)
# 8)Дифференцировать по переменной
sqrt(3*x + 2*y) - 7*x^2*y + 4*x*y + 2*x - 8*y + 1
# в результате дифференцирования
4*y + 3/(2*sqrt(3*x + 2*y)) - 14*x*y + 2
sqrt(3*x + 2*y) - 7*x^2*y + 4*x*y + 2*x - 8*y + 1  # в результате дифференцирования
4*x + (3*x + 2*y)^(-1/2) - 7*x^2 - 8
d/dx(sqrt(3*x + 2*y) - 7*x^2*y + 4*x*y + 2*x - 8*y + 1) → 4*y + 3/(2*sqrt(3*x + 2*y)) - 14*x*y + 2
d/dy(sqrt(3*x + 2*y) - 7*x^2*y + 4*x*y + 2*x - 8*y + 1) → 4*x + (3*x + 2*y)^(-1/2) - 7*x^2 - 8
# 9)Интегрирование
4*y + 3/(2*sqrt(3*x + 2*y)) - 14*x*y + 2  # в результате интегрирования
(3*x + 2*y)^2*((3*x + 2*y)^(-3/2) - 7*y/9 + (28*y^2/9 + 4*y/3 + 2/3)/(3*x + 2*y))
# в результате интегрирования
4*x + (3*x + 2*y)^(-1/2) - 7*x^2 - 8
(3*x + 2*y)*(2*x + (3*x + 2*y)^(-1/2) - 7*x^2/2 - 4)
integral(4*y + 3/(2*sqrt(3*x + 2*y)) - 14*x*y + 2, x) → (3*x + 2*y)^2*((3*x + 2*y)^(-3/2) - 7*y/9 + (28*y^2/9 + 4*y/3 + 2/3)/(3*x + 2*y))
integral(4*x + (3*x + 2*y)^(-1/2) - 7*x^2 - 8, y) → (3*x + 2*y)*(2*x + (3*x + 2*y)^(-1/2) - 7*x^2/2 - 4)
# 10)Разложить в ряд Тейлора указанное выражение
# x*e^x | преобразование в серию
x + x^2 + x^3/2 + x^4/6 + x^5/24 + x^6/120 + x^7/720 + x^8/5040 + x^9/40320 + x^10/362880 + x^11/3628800 + x^12/39916800
x*e^x series, 12 → x + x^2 + x^3/2 + x^4/6 + x^5/24 + x^6/120 + x^7/720 + x^8/5040 + x^9/40320 + x^10/362880 + x^11/3628800 + x^12/39916800
# 11)Разложить на элиментарные дроби
# Возращает симвльное  выраения относительно заданнрй переменной с выделением целой части если исходная дробь неправильна
# данная опереция может быть использована при интегрировании дробно рациональной функции
# расширение элементарных дробей до
9/(133*(2*x + 1)^2) - 96/(931*(2*x + 1)) + (12*x + 65)/(323*(x^2 + x + 5)) + 12/(833*(x - 3))
(x^3 - 2*x^2 + x)/((x^2 + x + 5)*(2*x + 1)^2*(x - 3))
(x^3 - 2*x^2 + x)/((x^2 + x + 5)*(2*x + 1)^2*(x - 3)) parfrac → 9/(133*(2*x + 1)^2) - 96/(931*(2*x + 1)) + (12*x + 65)/(323*(x^2 + x + 5)) + 12/(833*(x - 3))
# 4)Разложить по подвыражению (collect)
# Собрать слогаемые попдобные выделенному выражению которое можт быть отдельной переменной или функцией (результатом будет выражение полемелиальное относительно выбранному
(x + a - c)^2  # в результате приведения подобных членов
x^2 + (2*a - 2*c)*x + (a - c)^2
(x + a - c)^2 collect, x → x^2 + (2*a - 2*c)*x + (a - c)^2
(x + a - c)^2  # в результате приведения подобных членов
c^2 + (-2*a - 2*x)*c + (a + x)^2
