# Worksheet setting: ORIGIN = 1
# Лабораторная Работа №5
# 1 Задание
sig(x) :=
    y ← 1/x^2 if x ≤ -1
    otherwise
        y ← x^2 if -1 < x ≤ 2
        y ← 4 otherwise
sig(-5) = 0.04
sig(7) = 4
sig(1.25) = 1.5625
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# к  z1  z2  n  m
# 90 -30 50 10 9
# runif  -  Возвращает вектор из m случайных чисел, имеющих равномерное распределение на интервале [a,b].
# Задание №2
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ILK(k, z1, z2, m, n) :=
    b ← runif(k, z1, z2)
    c ← 1
    max ← b[1]
    for i ∈ 1 .. m
        for j ∈ 1 .. n
            G[i, j] ← b[c]
            c ← c + 1
    for i ∈ 1 .. m
        for j ∈ 1 .. n
            if G[i, j] > max
                max ← G[i, j]
                a ← i
                b ← j
    [G, "Максимальное  значение", max, "Столбец", b, "Строка", a]
ILK(90, -30, 51, 10, 9) = [[
    -13.678, -19.868, 42.4087, -12.0078, 15.3663, 4.31529, 39.9929, -8.34028, 25.2143;
    47.6644, 33.8459, 36.2889, -19.0011, -28.3735, 30.6124, 43.0712, 32.1987, 21.1071;
    25.2771, 10.5364, -8.45762, 22.3766, -8.64544, 7.2661, -1.52093, 8.60064, 2.71439;
    -27.7622, 18.3456, 5.00722, 1.02149, -29.1819, 40.0801, 26.6697, 18.7896, 15.3278;
    0.635128, 45.9248, 48.0921, 17.3005, 2.9688, 10.384, 40.856, 33.3033, 17.6617;
    -7.37557, 40.8262, -5.58548, 40.1933, -14.5518, 42.1173, -27.6665, -25.2005, -9.18845;
    -20.5938, 10.0871, -26.0076, -2.64994, 11.7594, 3.3955, 18.6853, 8.53581, 47.0562;
    37.6289, 34.934, 40.4753, 46.0716, 46.4089, -19.6605, 8.30289, -27.8394, 6.83874;
    -18.9752, -12.7637, 34.5735, 23.3374, 33.2959, 38.2109, 10.3987, -23.8671, -1.14594;
    3.19344, -5.86863, 30.335, -25.2823, -0.930654, -17.1339, -19.3237, -15.3024, -9.81286
], "Максимальное  значение", 48.0921, "Столбец", 3, "Строка", 5]
# Задание №3
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GLHF(n, m) :=
    for i ∈ 1 .. n
        for j ∈ 1 .. m
            A[i, j] ← ln(i)/cos(i + j)
    for i ∈ 1 .. n
        sum[i] ← 0
        for j ∈ 1 .. m
            sum[i] ← sum[i] + A[i, j] if mod(i, 2) == 0
    B ← A
    for i ∈ 1 .. m
        c ← B[n, i]
        B[n, i] ← B[2, i]
        B[2, i] ← c
    [A, "Измененная матрица ", B, "Сумма элементов нечетной строки ", sum]
GLHF(12, 6) = [[
    0, 0, 0, 0, 0, 0;
    -0.700154, -1.06044, 2.44357, 0.7219, 0.919413, -4.7639;
    -1.68075, 3.87296, 1.14418, 1.45723, -7.5506, -1.20577;
    4.88713, 1.4438, 1.83883, -9.52779, -1.52151, -1.65218;
    1.6762, 2.13481, -11.0614, -1.76642, -1.91812, 363.657;
    2.37665, -12.3145, -1.96652, -2.13541, 404.854, 2.12331;
    -13.3739, -2.13571, -2.31912, 439.684, 2.30598, 2.14438;
    -2.28227, -2.47826, 469.856, 2.46422, 2.29153, 15.2076;
    -2.61864, 496.47, 2.6038, 2.42133, 16.069, -2.89227;
    520.276, 2.72865, 2.53743, 16.8395, -3.03096, -2.40439;
    2.8416, 2.64246, 17.5365, -3.15642, -2.50391, -8.71444;
    2.73835, 18.1729, -3.27096, -2.59477, -9.03066, 3.7632
], "Измененная матрица ", [
    0, 0, 0, 0, 0, 0;
    2.73835, 18.1729, -3.27096, -2.59477, -9.03066, 3.7632;
    -1.68075, 3.87296, 1.14418, 1.45723, -7.5506, -1.20577;
    4.88713, 1.4438, 1.83883, -9.52779, -1.52151, -1.65218;
    1.6762, 2.13481, -11.0614, -1.76642, -1.91812, 363.657;
    2.37665, -12.3145, -1.96652, -2.13541, 404.854, 2.12331;
    -13.3739, -2.13571, -2.31912, 439.684, 2.30598, 2.14438;
    -2.28227, -2.47826, 469.856, 2.46422, 2.29153, 15.2076;
    -2.61864, 496.47, 2.6038, 2.42133, 16.069, -2.89227;
    520.276, 2.72865, 2.53743, 16.8395, -3.03096, -2.40439;
    2.8416, 2.64246, 17.5365, -3.15642, -2.50391, -8.71444;
    -0.700154, -1.06044, 2.44357, 0.7219, 0.919413, -4.7639
], "Сумма элементов нечетной строки ", [0; -2.43961; 0; -4.53172; 0; 392.937; 0; 485.059; 0; 536.946; 0; 9.77803]]
