# Worksheet setting: ORIGIN = 1
# Лабораторная работа №6
# Решение уравнений и систем.
# 1. С помощью встроенных функций решить уравнение вида f(x)=0  из табл.1.Построить график функции y=f(x).
f(x) := x^2*cos(2*x) + 1
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x := -2
root(f(x), x) = -2.25744
root(f(x), x, 4, 5.5) = 5.48114
# root | возвращает значение переменной с заданной точностью
f2(x) := 2*x^2 - 0.5^x - 3
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x2 := 1
root(f2(x2), x2) = 1.30476
root(f2(x2), x2, -3, -1) = -1.80046
root(f2(x2), x2, -10, -5) = -6.21377
# Экстремумы функций
y(x) := 2*x^3 - 9*x^2 - 4*x - 7
v := [-7; -4; -9; 2]
polyroots(v) = [-0.267623 + 0.789606i; -0.267623 - 0.789606i; 5.03525]
# Возвращает вектор, содержащий все корни многочлена, коэффициенты которого заданы параметром v.
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x3 := 1
# Возвращает значения переменных var1, var2, ..., удовлетворяющие ограничениям в блоке решения и доставляющие наибольшее значение функции f. Возвращает скаляр, если задан один аргумент, иначе возвращает вектор решений.
Given
Maximize(y, x3) = -0.207825
y(-0.208) = -6.57537
Minimize(y, x3) = 3.20782
y(3.208) = -46.4246  # Экстремумы функции
# Возвращает значения переменных var1, var2, ..., удовлетворяющие ограничениям в блоке решения и доставляющие наименьшее значение функции f. Возвращает скаляр, если указана одна переменная, иначе возвращает вектор решений.
# Решение Слау
x1 := 0
x2 := 0
x3 := 3
Given
0.63*x1 + 0.05*x2 + 0.15*x3 == 0.34
0.15*x1 + 0.10*x2 + 0.71*x3 == 0.42
0.03*x1 + 0.34*x2 + 0.10*x3 == 0.32
# Возвращает значения переменных var1, var2, ..., представляющие решение системы уравнений в блоке решения. Если указан только один аргумент, возвращает скаляр, иначе возвращает вектор решений.
Find(x1, x2, x3) = [0.381841; 0.78995; 0.399618]
A := [0.63, 0.05, 0.15; 0.15, 0.10, 0.71; 0.03, 0.34, 0.10]
b := [0.34; 0.42; 0.32]
x := [1; 1; 1]
lsolve(A, b) = [0.381841; 0.78995; 0.399618]
Given
# Возвращает значения переменных var1, var2, ..., наиболее удовлетворяющие системе уравнений и ограничениям в блоке решения. Возвращает скаляр, если задан один аргумент, иначе возвращает вектор решений. Если решение не сходится, возвращаются результаты последней итерации.
A*x == b
Minerr(x) = [0.381841; 0.78995; 0.399618]
# 4)
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Y1(X1) := 0.8 - sin(X1 + 1)
X2(Y2) := 1.3 - sin(Y2 - 1)
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x := 0
y := 0
Given
sin(y - 1) + x == 1.3
y + sin(x + 1) == 0.8
Find(x, y) = [1.80542; 0.470127]
