z(x, y) := x^2 + y^2
z1(x, y) := -(x^2 + y^2) + 20
# [component: inputs z, z1]
f(x, y) := sin(x^2 + y^2)
# [component: inputs f]
# Построение поверхности с помощью матрицы аппликат
N := 20
i := 0 .. N
j := 0 .. N
xmin := -2
ymin := -2
xmax := 2
ymax := 2
hx := (xmax - xmin)/N
hy := (ymax - ymin)/N
x[i] := xmin + i*hx
y[j] := ymin + j*hy
M[i, j] := f(x[i], y[j])
# [component: inputs M]
# Построение графика поверхности заданной параметрически
N := 20
C := 0 .. N
j := 0 .. N - 4
φ[i] := i*π/N
θ[j] := j*2*π/N
Y[i, j] := sin(φ[i])*sin(θ[j])
X[i, j] := sin(φ[i])*cos(θ[j])
Z[i, j] := cos(φ[i])
# [component: inputs (X, Y, Z)]
# 5. | Поверхность заданная вектором параметрической функцией
a := 5
b := 2
T(φ, θ) := [(a + b*cos(φ))*cos(θ); (a + b*cos(φ))*sin(θ); b*sin(φ)]
# [component: inputs T]
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# Построение функции с помощью встроенной функции CreateMesh
CreateMesh(F, x0, x1, y0, y1, s, t, m)
# Данная функция возвращает массив из 3-ч матриц представляющих координаты x,y,z для F определенной как функция двух переменных s,t.
# Аргументы x0,x1,y0,y1 задают пределы изменения этих переменных .
# m - вектор значений указывающий число линий сетки изображаемой функции
z3(x, y) := sin(x) + cos(y)
m := 30
a := -π
B := π
C := CreateMesh(z3, a, b, a, b, m)
# [component: inputs C]
# Получение поверхности вращением вокруг осей
a := -π
m := 30
g(x1) := x1*sin(x1)^2
b := 2
F(u, v) := u
G(u, v) := g(u)*cos(v)
H(u, v) := g(u)*sin(v)
SX := CreateMesh(F, G, H, a, b, 0, 2*π, m)
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# [component: inputs SX]
F1(u, v) := u*sin(v)
G1(u, v) := u*cos(v)
H1(u, v) := g(u)
SY := CreateMesh(F1, G1, H1, a, b, -π, π, m)
# [component: inputs SY]
# Кривая в пространстве
a := 7
# Трехмерные и точеченые графики можно использовать для посторения изображения пространственных кривых.Пространственные прямые задаются в параметрическом виде как функция одного параметра t(x(t),y(t))
N := 150
i := 0 .. N
a := 3
t[i] := i*2*π/N*a
x[i] := cos(t[i])
y[i] := sin(t[i])
q(t) := [t*sin(a*t); t*cos(a*t); 2*a*t]
z[i] := t[i]/(2*π)
Q := CreateSpace(q, 0, 5, 40)
# [component: inputs Q, (0, 12, 24)]
# [component: inputs (x, y, z)]
L2(t) := [t - 1; 2*t; 3 - 3*t]
S := CreateSpace(L2, 0, 5)
# [component: inputs S]
CreateSpace(f, t0, t1, t, m)
# Возвращает массив 3-ч векторов,представляющих z,y,z координаты пространственной прямой,определенной с помощью функций f одной переменной параметра t, изменяющегося в пределах от t0 до t1
# [component: inputs C]
# [component: inputs C]
# [component: inputs C]
# [component: inputs C]
x^2/y^2 + y^2/b^2 + z^2/c^2 = 1
z(x, y) := sqrt(1 - x^2/a^2 - y^2/b^2)
z1(x, y) := -c*sqrt(1 - x^2/a^2 - y^2/b^2)
M[i, j] := z(x[i], y[j])
M1[i, j] := z1(x[i, y[j]])
N := 30
i := 0 .. N
a := 4
b := 5
j := 0 .. N
ϕ[i] := i*3*π/N
θ[j] := j*2*π/N
a := 4
b := 5
R(ϕ) := 2*a*e^(-ϕ/b)
r(ϕ) := a*e^(-ϕ/b)
X1[i, j] := (R(ϕ[i]) + r(ϕ[i])*cos(θ[j]))*cos(ϕ[i])
Y1[i, j] := (R(ϕ[i]) + r(ϕ[i])*cos(θ[j]))*sin(ϕ[i])
Z1[i, j] := r(ϕ[i])*sin(θ[j])
# [component: inputs (X1, Y1, Z1)]
a := 2
f2(x, y) := a
f3(x, y) := b
# [component: inputs f2, f3]
# [component: inputs f2, f3]
# [component: inputs f2, f3]
# Построение многогранников
# [component: inputs Polyhedron("#80")]
# Векторные и градиентные поля
# Служит для представления 2-х мерных векторных полей
f(x, y) := sin(x)*cos(y)
N := 10
grad(x, y) := [d/dx(f(x, y)); d/dy(f(x, y))]
a := -2
b := 2
c := -4
d := 4
j := 0 .. N
i := 0 .. N
x[i] := a + i*(b - a)/N
y[j] := c + j*(d - c)/N
F[i, j] := f(x[i], y[j])
V[i, j] := grad(x[i], y[j])
Vx[i, j] := V[i, j][0]
Vy[i, j] := V[i, j][1]
# [component: inputs (Vx, Vy)]
# [component: inputs F]
