# Worksheet setting: ORIGIN = 1
# Работа на паре лаб 5
sig(x) :=
    y ← 1 if x > 0
    otherwise
        y ← 0 if x == 0
        y ← -1 otherwise
sig(-5) = -1
sig(7) = 1
sig(0) = 0
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SP(n) :=
    s ← 0
    p ← 1
    i ← 1
    j ← 1
    while i ≤ n
        s ← s + i^2
        i ← i + 2
    while j ≤ n
        p ← p*j
        j ← j + 1
    V[1] ← s
    V[2] ← p
    V
sp(n) :=
    s ← 0
    p ← 1
    for i ∈ 1, 3 .. n
        s ← s + i^2
    for j ∈ 1 .. n
        p ← p*j
    [s; p]
sp(5) = [35; 120]
SP(5) = [35; 120]
# Вычисление наибольшего Делителя
NOD(a, b) :=
    while a ≠ b
        a ← a - b if a > b
        b ← b - a otherwise
    a
NOD(1, 19) = 1
NOD(45, 15) = 15
NOD(18, 24) = 6
# Найти в одномерном массиве номер первого элемента равного нулю
F(a) :=
    k ← 0
    for i ∈ 1 .. rows(a)
        if a[i] == 0
            k ← i
            break
    k
a := [1; 6; 2; 0; 8]
b := [1; 2; 3; 4; 5]
F(a) = 4
F(b) = 0
# Вычисление произведения ненулевых элементов
# в одномерном массиве найти произведения ненулевых элеменов
M(a) :=
    p ← 1
    for i ∈ 1 .. rows(a)
        continue if a[i] == 0
        p ← p*a[i]
    p
M(a) = 96
# Случайные числа
z1 := -30
z2 := 50
# runif  -  Возвращает вектор из m случайных чисел, имеющих равномерное распределение на интервале [a,b].
runif(i, z1, z2)
k[i] =  # error: Эта переменная не определена.
Return
# Оператор прерывания всего модуля, прерывает выполнение программы в любо  й точке и возвращает значение выражения, переменной, текстовое сообщение стоящего следом за ним.
# Проверить состоит ли массив из единиц и вывести словестное сообщение
F2(a) :=
    for i ∈ 1 .. rows(a)
        return "no" if a[i] ≠ 1
    "yes"
a = [1; 6; 2; 0; 8]
b := [1; 1; 1; 1; 1]
F2(a) = "no"
F2(b) = "yes"
F3(x) :=
    y ← x
    try
        1/(y^2 - 1)
    on error
        "divient 0"
F3(1) = "divient 0"
F3(5) = 0.0416667
F4(j) :=
    return "one" if j == 1
    if j == 2
        {
            return "two"
        }
    error("No value ") otherwise
F4(1) = "one"
F4(5) =  # error: No value
F4(2) = "two"
# Найти сумму элементов в каждой строке
d := [-5, 0, 3, 4; 1, -2, 0, 6; 7, -1, 9, 5; 0, 3, -8, 2; -6, 7, 0, 3]
b := [1, 1; 1, 1]
F5(c) :=
    for i ∈ 1 .. rows(c)
        v[i] ← 0
        for j ∈ 1 .. cols(c)
            v[i] ← v[i] + c[i, j] if c[i, j] > 0
    min ← v[1]
    for i ∈ 1 .. rows(v)
        min ← v[i] if v[i] < min
    for i ∈ 1 .. rows(c)
        for j ∈ 1 .. cols(c)
            c[i, j] ← c[i, j] - min
    [v; min; c]
F5(b) = [[2; 2]; 2; [-1, -1; -1, -1]]
F5(d) = [
    [7; 7; 21; 5; 10]; 5; [-10, -5, -2, -1; -4, -7, -5, 1; 2, -6, 4, 0; -5, -2, -13, -3; -11, 2, -5, -2]
]
