# Worksheet setting: ORIGIN = 1
# Работа на паре лаб 6
# Возвращает значение переменной var, для которого функция f принимает нулевое значение. Если указаны параметры a и b, функция root находит значение var на этом интервале. В противном случае var необходимо определить с помощью начального приближения до вызова функции root.
root(f(var), var, (a, b))
# если выводов несколько то возьмется первое значение
f(x) := 0
f(x) := (2 - x)*e^x - 0.5
y := f(x)  # error: Эта переменная не определена.
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x := -1
root(f(x), x) = -2.10547
root(f(x), x, 1, 3) = 1.92722
# Для поиска корней полинома Pn(x)= a0+a1x1+a2x^2+a3x^3+++anx^n
Pn(x) := 2*x^3 - 9*x^2 + 4*x - 7
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v := [-7; 4; -9; 2]
# Возвращает вектор, содержащий все корни многочлена, коэффициенты которого заданы параметром v. Щелкните эту функцию правой кнопкой мыши для выбора решателя.
polyroots(v) = [0.138673 - 0.899796i; 0.138673 + 0.899796i; 4.22265]
# Невозможно решать системы уравнений
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# Решение уравнений и систем с помощью вычислительного блока  с директивой Given
# Структура
# Начальное условие определяет начальные значения искомых переменных. Ограничительные условия задаются в виде неравенств. Число уравнений в системе может достигать 200-сот. При решении систем уравнений начальные условия, уравнения и ограничения могут задаваться в виде векторной или матричной форме
# 1 Начальное условие
# 2 Записывается директива
# 3 Уравнение или неравенство
# 4 ограничительные условия
# 5 выражение функции
# Возвращает значения переменных var1, var2, ..., представляющие решение системы уравнений в блоке решения. Если указан только один аргумент, возвращает скаляр, иначе возвращает вектор решений.
Find(var1, var2_.........)
# Возвращает значения переменных var1, var2, ..., наиболее удовлетворяющие системе уравнений и ограничениям в блоке решения. Возвращает скаляр, если задан один аргумент, иначе возвращает вектор решений. Если решение не сходится, возвращаются результаты последней итерации. Данная пытается найти максимальное приближение даже не к существующему решению(точку более приближенную к Х) путем минимизации среднеквадратичной погрешности решения
Minerr(Var1, var2_.....)
# Возвращает значения переменных var1, var2, ..., удовлетворяющие ограничениям в блоке решения и доставляющие наименьшее значение функции f. Возвращает скаляр, если указана одна переменная, иначе возвращает вектор решений.
Minimize(f, var1, var2_........)
# Возвращает значения переменных var1, var2, ..., удовлетворяющие ограничениям в блоке решения и доставляющие наибольшее значение функции f. Возвращает скаляр, если задан один аргумент, иначе возвращает вектор решений.
Maximize(F, var1, var2_......)
x := 1
Given
Maximize(Pn, x) = 0.241694
Pn(0) = -7
x1 := 0
x2 := 0
x3 := 3
Given
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0, 61*x1 + 0, 05*x2 + 0, 15*x3 == 0, 34
0, 15*x1 + 0, 10*x2 + 0, 71*x3 == 0, 42
0, 03*x1 + 0, 34*x2 + 0, 10*x3 == 0.32
Find(x1, x2, x3) = [0; 0; 3]
A := [0.61, 0.05, 0.15; 0.15, 0.10, 0.71; 0.03, 0.34, 0.10]
B := [0.34; 0.42; 0.34]
X := [1; 1; 1]
Given
A*X == B
Minerr(X) = [0.391996; 0.851039; 0.388869]
y(x4) := sin(x4 + 1) - 1.2
x1(y1) := 1/2*(2 - cos(y1))
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x := 0
y := 0
Given
sin(x + 1) - y == 1.2
2*x + cos(y) == 2
Find(x, y) = [0.51015; -0.201838]
