# Лабораторная работа №3
# тема:"Трехмерная графика"
z(x, y) := x^2 + y^2 - 20
z1(x, y) := -(x^2 + y^2) + 20
# [component: inputs z, z1]
f(x, y) := sin(x^2 + y^2)
# [component: inputs f]
i := 0 .. 20
j := 0 .. 20
h := 0.2
x[i] := -2 + i*h
y[j] := -2 + j*h
M[i, j] := f(x[i], y[j])
# [component: inputs M]
f1(x, y) := sin(x) + cos(y)
Q := CreateMesh(f1, -π, π, -π, π, 30)
# [component: inputs Q]
a := -π
b := 2
mesh := 30
f2(x) := x*sin(x)^2
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# Вращение кривой вокруг оси Ox: | Вращение кривой вокруг оси Oy:
F1(u, v) := u*sin(v)
F(u, v) := u
G1(u, v) := u*cos(v)
G(u, v) := f2(u)*cos(v)
H1(u, v) := f2(u)
H(u, v) := f2(u)*sin(v)
SX := CreateMesh(F, G, H, a, b, 0, 2*π, mesh)
SY := CreateMesh(F1, G1, H1, a, b, -π, π, mesh)
# [component: inputs SX]
# [component: inputs SY]
# Построение графика поверхности заданной параметрически:
N := 20
i := 0 .. N
j := 0 .. N - 5
φ[i] := i*π/N
θ[j] := j*2*π/N
X[i, j] := sin(φ[i])*cos(θ[j])
Y[i, j] := sin(φ[i])*sin(θ[j])
Z[i, j] := cos(φ[i])
# [component: inputs (X, Y, Z)]
# Поверхность, заданная вектором параметрической функции
a := 5
b := 2
T(φ, θ) := [(a + b*cos(φ))*cos(θ); (a + b*cos(φ))*sin(θ); b*sin(φ)]
# [component: inputs T]
# Построение поверхности в различных системах координат:
f3(x, y) := a
f4(x, y) := b
# [component: inputs f3, f4]
# [component: inputs f3, f4]
# [component: inputs f3, f4]
# Построение линий, заданных параметрически,  в пространстве
a := 2
b := 2
c := 1
f0(t) := [t*sin(a*t); t*cos(b*t); c*t]
F0 := CreateSpace(f0, 0, 15, 150)
# [component: inputs F0]
N := 100
a := 5
b := 2
i := 0 .. N
y[i] := sin(i/N*a*π)
x[i] := cos(i/N*a*π)
z[i] := i/N*b
# [component: inputs (x, y, z)]
# Построение многогранников
# [component: inputs Polyhedron("#26")]
# Векторные и градиентные поля:
b := 2
a := -2
f(x, y) := sin(x)*cos(y)
Nx := 10
c := -4
d := 4
Ny := 10
i := 0 .. Nx
j := 0 .. Ny
grad(x, y) := [d/dx(f(x, y)); d/dy(f(x, y))]
x[i] := a + i*(b - a)/Nx
y[j] := c + j*(d - c)/Ny
F[i, j] := f(x[i], y[j])
V[i, j] := grad(x[i], y[j])
Vx[i, j] := V[i, j][0]
Vy[i, j] := V[i, j][0]
# [component: inputs (Vx, Vy)]
# [component: inputs F]
