# Worksheet setting: ORIGIN = 1
# Лабораторная работа №5.
# Вариант 21.
# Задание №1(7 вариант)
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sig(x) :=
    y ← (x + 2)^2 if x ≤ -2
    y ← sqrt(4 - x^2) if -2 < x ≤ 2
    y ← sqrt(x - 2) if x > 2
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# Задание №2(Вариант - 1).
# Условие  k  z1  z2  n  m1
# 80 -30 20  8  10
diff(k, z1, z2, n, m) :=
    b ← runif(k, z1, z2)
    max ← 1
    min ← 1
    c ← 1
    for i ∈ 1 .. m
        for j ∈ 1 .. n
            Q[i, j] ← b[c]
            c ← c + 1
    for i ∈ 1 .. m
        for i ∈ 1 .. n
            max ← Q[i, j] if Q[i, j] > max
            min ← Q[i, j] if Q[i, j] < min
    ["Ответ"; (max - min); Q]
diff(80, -30, 20, 8, 10) = [
    "Ответ";
    35.2416;
    [
        -27.4133, 19.5429, 2.17121, 15.0376, 15.7664, -6.00902, 7.88511, 7.23034;
        -11.8557, 11.1129, -8.26656, -25.8767, 1.28474, -13.6925, -5.75111, -1.90346;
        4.81593, -9.91597, 14.4437, 0.330425, 10.0708, 10.7492, -25.9356, 19.1267;
        -5.03634, -1.6366, 13.0989, 19.4779, -9.87469, -10.0664, 16.5437, -16.1149;
        -3.71376, 15.8506, -27.604, -15.567, -17.0967, -12.4037, 10.9229, -13.8925;
        18.0579, 16.6794, -24.8294, -18.6316, -20.4285, 14.8354, -27.2904, 5.96429;
        -2.60381, -24.5296, 8.65513, -13.9931, -22.7513, -13.6384, -0.0751045, 16.2931;
        5.48978, -26.4107, -29.2679, 19.8712, -14.7374, -23.2518, -20.6379, -11.1378;
        3.86646, 5.38302, -23.8309, 6.53115, -18.6024, -23.3152, -7.16555, 0.611839;
        0.630248, -15.5606, 12.8808, -22.1355, 18.146, -0.780771, -26.5754, -10.0881
    ]
]
# Задание №3(Вариант-1)
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func(n, m) :=
    for i ∈ 1 .. n
        for j ∈ 1 .. m
            mass[i, j] ← sin(i)/ln(2*i + j)
    for i ∈ 1 .. n
        S[i] ← 0
        for j ∈ 1 .. m
            S[i] ← S[i] + mass[i, j]
    mass1 ← mass
    mass1[:, 1] ← mass[:, cols(mass)]
    mass1[:, cols(mass)] ← mass[:, 1]
    ["Исходная матрица:", mass, "Измененная матрица:", mass1, "Сумма элементов строк:", S]
akimloh := [1, 2, 3; 43, 5, 6; 78, 9, 228]
akimloh[:, 1] = [1; 43; 78]
func(8, 8) = ["Исходная матрица:", [
    0.76594, 0.606993, 0.522835, 0.469634, 0.432431, 0.404662, 0.38297, 0.365446;
    0.564978, 0.507489, 0.467286, 0.43728, 0.413839, 0.394903, 0.379206, 0.365928;
    0.0725213, 0.0678644, 0.0642265, 0.0612876, 0.0588516, 0.0567909, 0.0550186, 0.0534736;
    -0.344436, -0.328675, -0.315611, -0.30456, -0.295056, -0.28677, -0.279464, -0.272959;
    -0.399902, -0.3859, -0.373857, -0.363359, -0.354101, -0.345859, -0.338458, -0.331765;
    -0.108936, -0.105877, -0.10318, -0.100778, -0.0986214, -0.0966711, -0.094896, -0.0932712;
    0.242605, 0.236958, 0.231887, 0.227302, 0.223128, 0.219308, 0.215793, 0.212545;
    0.3492, 0.342294, 0.336009, 0.330256, 0.324963, 0.320073, 0.315535, 0.311309
], "Измененная матрица:", [
    0.365446, 0.606993, 0.522835, 0.469634, 0.432431, 0.404662, 0.38297, 0.76594;
    0.365928, 0.507489, 0.467286, 0.43728, 0.413839, 0.394903, 0.379206, 0.564978;
    0.0534736, 0.0678644, 0.0642265, 0.0612876, 0.0588516, 0.0567909, 0.0550186, 0.0725213;
    -0.272959, -0.328675, -0.315611, -0.30456, -0.295056, -0.28677, -0.279464, -0.344436;
    -0.331765, -0.3859, -0.373857, -0.363359, -0.354101, -0.345859, -0.338458, -0.399902;
    -0.0932712, -0.105877, -0.10318, -0.100778, -0.0986214, -0.0966711, -0.094896, -0.108936;
    0.212545, 0.236958, 0.231887, 0.227302, 0.223128, 0.219308, 0.215793, 0.242605;
    0.311309, 0.342294, 0.336009, 0.330256, 0.324963, 0.320073, 0.315535, 0.3492
], "Сумма элементов строк:", [3.95091; 3.53091; 0.490035; -2.42753; -2.8932; -0.80223; 1.80953; 2.62964]]
