# Лабораторная работа №4
# Тема: Преобразование выражений
# Вариант №21(1)
# Задание №1. Упростить выражение
(a/(a*b - b^2) + b/(a^2 - a*b) - 2/(a - b))*(1/(a*b))^-1 simplify → a - b
(a/(a*b - b^2) + b/(a^2 - a*b) - 2/(a - b))*(1/(a*b))^-1  # упрощение до
a - b
# Задание №2. Раскрыть скобки и разложить на множители
(a - b)^4 expand → a^4 - 4*a^3*b + 6*a^2*b^2 - 4*a*b^3 + b^4
(a - b)^4  # расширение до
a^4 - 4*a^3*b + 6*a^2*b^2 - 4*a*b^3 + b^4
# Разложение на множители
a^4 - 4*a^3*b + 6*a^2*b^2 - 4*a*b^3 + b^4 factor → (a - b)^4
a^4 - 4*a^3*b + 6*a^2*b^2 - 4*a*b^3 + b^4  # в результате факторизации
(a - b)^4
# Разложение относительно переменной
(x + a - c)^2 collect, x → x^2 + (2*a - 2*c)*x + (a - c)^2
(x + a - c)^2 collect, a → a^2 + (2*x - 2*c)*a + (c - x)^2
(x + a - c)^2 collect, c → c^2 + (-2*a - 2*x)*c + (a + x)^2
(x + a - c)^2  # в результате приведения подобных членов
x^2 + (2*a - 2*c)*x + (a - c)^2
(x + a - c)^2  # в результате приведения подобных членов
a^2 + (2*x - 2*c)*a + (c - x)^2
(x + a - c)^2  # в результате приведения подобных членов
c^2 + (-2*a - 2*x)*c + (a + x)^2
# Полиномиальные коэффициенты
(x - a)^2*(2*x - 1)*(x^2 - 1) + b*x^3 + c coeffs, x → [a^2 + c; -2*a^2 - 2*a; 4*a - a^2 + 1; 2*a^2 + 2*a + b - 2; -4*a - 1; 2]
(x - a)^2*(2*x - 1)*(x^2 - 1) + b*x^3 + c
# имеются коэффициенты
[a^2 + c; -2*a^2 - 2*a; 4*a - a^2 + 1; 2*a^2 + 2*a + b - 2; -4*a - 1; 2]
(x + a)*(x - b) coeffs, x → [-a*b; a - b; 1]
[-a*b; a - b; 1]
(x + a)*(x - b)  # имеются коэффициенты
(x + 1)/3 - x*sin(1) + x^2*e^(-b) - ln(c) coeffs, x → [1/3 - ln(c); 1/3 - sin(1); e^(-b)]
(x + 1)/3 - x*sin(1) + x^2*e^(-b) - ln(c)  # имеются коэффициенты
[1/3 - ln(c); 1/3 - sin(1); e^(-b)]
# Задание №3. Решить уравнение
(x + 1/x)^2 - 4.5*(x + 1/x) + 5 == 0 solve, x → [1.0; 0.5; 2.0]
# имеются решения
(x + 1/x)^2 - 4.5*(x + 1/x) + 5
[1.0; 0.5; 2.0]
(x + 1/x)^2 - 4.5*(x + 1/x) + 5 substitute, x == 1.0 → 0.0
(x + 1/x)^2 - 4.5*(x + 1/x) + 5 == 0 substitute, x == 0.5 → 0.0 == 0
(x + 1/x)^2 - 4.5*(x + 1/x) + 5 substitute, x == a + b → (a^4 + 4.0*a^3*b - 4.5*a^3 + 6.0*a^2*b^2 - 13.5*a^2*b + 7.0*a^2 + 4.0*a*b^3 - 13.5*a*b^2 + 14.0*a*b - 4.5*a + b^4 - 4.5*b^3 + 7.0*b^2 - 4.5*b + 1.0)/(a + b)^2
# в результате подстановки
(x + 1/x)^2 - 4.5*(x + 1/x) + 5
(a^4 + 4.0*a^3*b - 4.5*a^3 + 6.0*a^2*b^2 - 13.5*a^2*b + 7.0*a^2 + 4.0*a*b^3 - 13.5*a*b^2 + 14.0*a*b - 4.5*a + b^4 - 4.5*b^3 + 7.0*b^2 - 4.5*b + 1.0)/(a + b)^2
# Задание №4.Дифференцировать и интегрировать
x*y*(2*x - 1) + 9*x - 3*y + 1  # в результате дифференцирования
y*(2*x - 1) + 2*x*y + 9
d/dx(x*y*(2*x - 1) + 9*x - 3*y + 1) → y*(2*x - 1) + 2*x*y + 9
x*y*(2*x - 1) + 9*x - 3*y + 1  # в результате дифференцирования
x*(2*x - 1) - 3
d/dy(x*y*(2*x - 1) + 9*x - 3*y + 1) → x*(2*x - 1) - 3
x*y*(2*x - 1) + 9*x - 3*y + 1
# в результате интегрирования
2*y*x^3/3 + (9/2 - y/2)*x^2 + (1 - 3*y)*x
integral(x*y*(2*x - 1) + 9*x - 3*y + 1, x) → 2*y*x^3/3 + (9/2 - y/2)*x^2 + (1 - 3*y)*x
x*y*(2*x - 1) + 9*x - 3*y + 1  # в результате интегрирования
(9*x - 3*y + x*y*(2*x - 1) + 1)^2/(2*(x*(2*x - 1) - 3))
integral(x*y*(2*x - 1) + 9*x - 3*y + 1, y) → (9*x - 3*y + x*y*(2*x - 1) + 1)^2/(2*(x*(2*x - 1) - 3))
# Задание №5. Разложить в ряд Тейлора
1/sqrt(1 + x^2) series, 12 → 1 - x^2/2 + 3*x^4/8 - 5*x^6/16 + 35*x^8/128 - 63*x^10/256
1/sqrt(1 + x^2)  # преобразование в серию
1 - x^2/2 + 3*x^4/8 - 5*x^6/16 + 35*x^8/128 - 63*x^10/256
# Задание №6. Разложить на элементарные дроби
(15*x + 6)/((2*x + 1)^2*(x^2 + 2*x + 2)*(x - 3)) parfrac → (21*x + 24)/(25*(x^2 + 2*x + 2)) - 2208/(1225*(2*x + 1)) + 12/(35*(2*x + 1)^2) + 3/(49*(x - 3))
(15*x + 6)/((2*x + 1)^2*(x^2 + 2*x + 2)*(x - 3))  # расширение элементарных дробей до
(21*x + 24)/(25*(x^2 + 2*x + 2)) - 2208/(1225*(2*x + 1)) + 12/(35*(2*x + 1)^2) + 3/(49*(x - 3))
