# Лабораторная №1
x1 := 0
x2 := 0  # начальные приближения
x3 := 0
x4 := 0
f(x1, x2, x3, x4) := 2*x1 + x2 + 3*x3 + 5*x4  # целевая функция
Ограничения
Given
2*x1 + 3*x2 + x3 + 2*x4 ≤ 30
4*x1 + 2*x2 + x3 + 2*x4 ≤ 40
x1 ≥ 0
x2 ≥ 0
x3 ≥ 0
x4 ≥ 0
x1 + 2*x2 + 3*x3 + x4 ≤ 25
result := Maximize(f, x1, x2, x3, x4)
transpose(result) = [0, 0, 4, 13]
# [component: inputs result]
